*Heading
** Job name: Beam-Gravity-Umat Model name: Beam-BodyForce-Dload-Umat
** Generated by: Abaqus/CAE 2020
*Preprint, echo=NO, model=NO, history=NO, contact=NO
**
** PARTS
**
*Part, name=Plate
*Node
      1,          0.5, 0.00499999989,           0.
      2,           1., 0.00499999989,           0.
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*Element, type=C3D20H
  1,  1129,  3367,  3921,  1128,     1,    19,   572,     4,  7802,  7801,  7800,  7799,  7803,  7804,  7805,
      7806,  7808,  7807,  7809,  7810
  2,  3367,  3368,  3922,  3921,    19,    20,   571,   572,  7813,  7812,  7811,  7801,  7814,  7815,  7816,
      7804,  7807,  7817,  7818,  7809
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*Nset, nset=LeftBottom
    17,    18, 24216
*Elset, elset=LeftBottom
 2780,
*Nset, nset=LeftTop
    14,    15, 20613
*Elset, elset=LeftTop
 2225,
*Nset, nset=LeftEnd
    13,    14,    15,    16,    17,    18
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*Elset, elset=LeftEnd
 1669, 1947, 2225, 2780, 3058, 3336
*Nset, nset=WholeRegion, generate
     1,  26165,      1
*Elset, elset=WholeRegion, generate
    1,  3336,     1
*Nset, nset=LeftMid
    13,    16, 17001
*Nset, nset=Right
    11, 10, 1694, 1695, 1693, 1696, 3, 2, 1132, 1133, 1131, 1134, 6, 5
*Elset, elset=LeftMid
 1669, 3336
** Section: Homo
*Solid Section, elset=WholeRegion, material=neoHookean
,
*End Part
**
**
** ASSEMBLY
**
*Assembly, name=Assembly
**
*Instance, name=Plate-1, part=Plate
*End Instance
**
*End Assembly
**
** MATERIALS
**
*Material, name=neoHookean
*Depvar
      9,
*User Material, constants=1
1E+06,
** ----------------------------------------------------------------
**
** STEP: Growth
**
*Step, name=Growth, nlgeom=YES, inc=50
*Static
1e-04, 1., 1e-05, 0.5
**
** BOUNDARY CONDITIONS
**
*Boundary
Plate-1.LeftEnd, 1, 1
Plate-1.LeftEnd, 2, 2
*Boundary
Plate-1.WholeRegion, 3, 3
**
** LOADS
**
*Dload
Plate-1.WholeRegion, BXNU, 0.
Plate-1.WholeRegion, BYNU, 1.
**
** OUTPUT REQUESTS ---------------------------------------------------
*Output, field, freq=1
*Node Output, NSET=Plate-1.WholeRegion
 U, COORD
*Element Output, Elset=Plate-1.WholeRegion
 S,SDV
*End Step
** ----------------------------------------------------------------
**
** STEP: Load + Constraint
**
*Step, name=Load, nlgeom=YES, inc=100
** *Static, stabilize, factor=100, allsdtol=10, continue=NO
*Static
0.1, 1., 1e-04, 0.2
**
** BOUNDARY CONDITIONS
**
*Boundary
Plate-1.LeftEnd, 1, 1
Plate-1.LeftEnd, 2, 2
** Plate-1.Right, 1, 1, -1.0
*Boundary
Plate-1.WholeRegion, 3, 3
**
** LOADS
**
*Dload
Plate-1.WholeRegion, BXNU, 0.
Plate-1.WholeRegion, BYNU, 1.
**
** OUTPUT REQUESTS ---------------------------------------------------
*Output, field, freq=1
*Node Output, NSET=Plate-1.WholeRegion
 U, COORD
*Element Output, Elset=Plate-1.WholeRegion
 S,SDV
*End Step
** ----------------------------------------------------------------
**
** STEP: Relax
**
*Step, name=Relax, nlgeom=YES, inc=100
** *Static, stabilize, factor=0.1, allsdtol=0.01, continue=NO
*Static
0.01, 1., 1e-05, 0.2
**
** BOUNDARY CONDITIONS
**
*Boundary
Plate-1.LeftEnd, 1, 1
Plate-1.LeftEnd, 2, 2
** Plate-1.ExtraBottom, 1, 1
*Boundary
Plate-1.WholeRegion, 3, 3
**
** LOADS
**
*Dload
Plate-1.WholeRegion, BXNU, 0.
Plate-1.WholeRegion, BYNU, 1.
**
** OUTPUT REQUESTS ---------------------------------------------------
*Output, field, freq=1
*Node Output, NSET=Plate-1.WholeRegion
 U, COORD
*Element Output, Elset=Plate-1.WholeRegion
 S,SDV
*End Step
